// SBML level 3 version 2

model cell_cycle_no_M()

  // Compartments:
  compartment default = 1;

  // Species:
  substanceOnly species __s0 in default = G1_0; __s0 is "live_cell(cycle='G1')";
  substanceOnly species __s1 in default = S_0; __s1 is "live_cell(cycle='S')";
  substanceOnly species __s2 in default = G2_0; __s2 is "live_cell(cycle='G2')";
  substanceOnly species __s3 in default = D_0; __s3 is "dead_cell()";

  // Parameters:
  kG1S = 0.1;
  rG1S = 0.1;
  kSG2 = 0.1;
  rSG2 = 0.1;
  kG2MG1 = 0.1;
  rG2MG1 = 0.1;
  kphi = 0.1;
  rphi = 0.1;
  G1_0 = 0;
  S_0 = 0;
  G2_0 = 0;
  D_0 = 0;
  var __obs0; __obs0 is "G1_obs";
  var __obs1; __obs1 is "S_obs";
  var __obs2; __obs2 is "G2_plus_M_obs";
  var __obs3; __obs3 is "D_obs";

  // Assignment rules:
  rateG1S := kG1S*rG1S;
  rateSG2 := kSG2*rSG2;
  rateG2MG1 := kG2MG1*rG2MG1;
  ratedeath := kphi*rphi;
  __obs0 := __s0;
  __obs1 := __s1;
  __obs2 := __s2;
  __obs3 := __s3;

  // Reactions:
  G1_S: __s0 => __s1; __s0*rateG1S;
  S_G2: __s1 => __s2; __s1*rateSG2;
  G2_M_G1: __s2 => __s0 + __s0; __s2*rateG2MG1;
  r3: __s0 => __s3; __s0*ratedeath; r3 is "death";
  r4: __s1 => __s3; __s1*ratedeath; r4 is "death";
  r5: __s2 => __s3; __s2*ratedeath; r5 is "death";
end
